X[0] := -7
X[1] := -7
X[2] := -5
X[3] := -7
fi := 45
Y[2] := 7
Y[3] := 5
Y[0] := 5
Y[1] := 7
K := [X[0], Y[0], 1; X[1], Y[1], 1; X[2], Y[2], 1] = [-7, 5, 1; -7, 7, 1; -5, 7, 1]
fi_rad := (fi*π)/180 = 0.785398
dx1 := -7
dy1 := 7
dx2 := 3
dy2 := -2
Ts(dx, dy) := [1, 0, 0; 0, 1, 0; -dx, -dy, 1]
Rs(f) := [cos(f), -sin(f), 0; sin(f), cos(f), 0; 0, 0, 1]
P := [X[0], X[1], X[2]; Y[0], Y[1], Y[2]; 1, 1, 1]
NTS := K*Ts(dx1, dy1)*Rs(fi_rad)*Ts(-dx2, -dy2)*Ts(-dx1, -dy1)
T(dx, dy) := [1, 0, -dx; 0, 1, -dy; 0, 0, 1]
R(f) := [cos(f), sin(f), 0; -sin(f), cos(f), 0; 0, 0, 1]
X2[0] := NTS[0, 0]
X2[1] := NTS[1, 0]
X2[2] := NTS[2, 0]
X2[3] := NTS[0, 0]
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Y2[0] := NTS[0, 1]
Y2[1] := NTS[1, 1]
Y2[2] := NTS[2, 1]
Y2[3] := NTS[0, 1]
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NT := T(-dx1, -dy1)*T(-dx2, -dy2)*R(fi_rad)*T(dx1, dy1)*P
NT = [-5.41421, -4, -2.58579; 3.58579, 5, 3.58579; 1, 1, 1]
X1[0] := NT[0, 0]
X1[1] := NT[0, 1]
X1[2] := NT[0, 2]
X1[3] := NT[0, 0]
Y1[0] := NT[1, 0]
Y1[1] := NT[1, 1]
Y1[2] := NT[1, 2]
Y1[3] := NT[1, 0]
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