xa := 5
ya := 2
xb := 10
yb := 12
xc := 13
yc := 8
xLW := 200
yLW := 300
xHW := 800
yHW := 700
Zy := transpose([ya, yb, yc])
Zx := transpose([xa, xb, xc])
# левый верхний угол в МСК
xL := min(Zx) = 5
yH := max(Zy) = 12
# правый нижний угол в МСК
xH := max(Zx) = 13
yL := min(Zy) = 2
ΔxW := xHW - xLW = 600
ΔyW := yHW - yLW = 400
Δy := yH - yL = 10
Δx := xH - xL = 8
kx := ΔxW/Δx = 75
ky := ΔyW/Δy = 40
TSW := [kx, 0, xLW - kx*xL; 0, -ky, yHW + ky*yL; 0, 0, 1] = [75, 0, -175; 0, -40, 780; 0, 0, 1]
[xaw; yaw; q] := TSW*[xa; ya; 1] = [200; 700; 1]
[xbw; ybw; q] := TSW*[xb; yb; 1] = [575; 300; 1]
[xcw; ycw; q] := TSW*[xc; yc; 1] = [800; 460; 1]
X := transpose([xa, xb, xc, xa])
Y := transpose([ya, yb, yc, ya])
XW := transpose([xaw, xbw, xcw, xaw])
YW := transpose([yaw, ybw, ycw, yaw])
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