X := [0, 0, 0, 0; 1, 1, 1, 1; 2, 2, 2, 2; 3, 3, 3, 3]
Y := [0, 1, 2, 3; 0, 1, 2, 3; 0, 1, 2, 3; 0, 1, 2, 3]
Z := [0, 2, 2, 1.5; 1, 1.5, 1.8, 2; -1, 0, 1.5, 1.5; 0.5, 0.5, 1.8, 1.5]
M := [-1, 3, -3, 1; 3, -6, 3, 0; -3, 3, 0, 0; 1, 0, 0, 0]
MT := transpose(M) = [-1, 3, -3, 1; 3, -6, 3, 0; -3, 3, 0, 0; 1, 0, 0, 0]
nu := 0 .. 10
nv := 0 .. 10
u[nu] := 0.1*nu
v[nv] := 0.1*nv
U[nu, 0] := u[nu]^3
U[nu, 1] := u[nu]^2
U[nu, 2] := u[nu]
U[nu, 3] := 1
V[nv, 0] := v[nv]^3
V[nv, 1] := v[nv]^2
V[nv, 2] := v[nv]
V[nv, 3] := 1
VT := transpose(V)
xx := U*M*X*MT*VT
yy := U*M*Y*MT*VT
zz := U*M*Z*MT*VT
# [component: inputs (xx, yy, zz)]
