X[0] := -4
X[1] := 0
X[2] := 4
X[3] := -4
Y[0] := -3
Y[1] := 3
Y[2] := -3
Y[3] := -3
f := 90
P := [X[0], Y[0], 1; X[1], Y[1], 1; X[2], Y[2], 1]
K := [X[0], X[1], X[2]; Y[0], Y[1], Y[2]; 1, 1, 1]
RS(f) := [cos(f), -sin(f), 0; sin(f), cos(f), 0; 0, 0, 1]
f_rad := f*π/180
R(f) := [cos(f), sin(f), 0; -sin(f), cos(f), 0; 0, 0, 1]
NTS := P*RS(f_rad)
NT := R(f_rad)*K
X2[0] := NTS[0, 0]
X2[1] := NTS[1, 0]
X2[2] := NTS[2, 0]
X2[3] := NTS[0, 0]
X1[0] := NT[0, 0]
X1[1] := NT[0, 1]
X1[2] := NT[0, 2]
X1[3] := NT[0, 0]
Y2[0] := NTS[0, 1]
Y2[1] := NTS[1, 1]
Y2[2] := NTS[2, 1]
Y2[3] := NTS[0, 1]
Y1[0] := NT[1, 0]
Y1[1] := NT[1, 1]
Y1[2] := NT[1, 2]
Y1[3] := NT[1, 0]
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