A := [6; 0; 1]
B := [6; 2; 1]
C := [8; 0; 1]
D := [6; 0; 1]
T(dx, dy) := [1, 0, -dx; 0, 1, -dy; 0, 0, 1]
R(f) := [cos(f), sin(f), 0; -sin(f), cos(f), 0; 0, 0, 1]
M := augment(A, B, C, D) = [6, 6, 8, 6; 0, 2, 0, 0; 1, 1, 1, 1]
f := 90
f_rad := f*3.14/180 = 1.57
x := transpose(M)[:, 0]
y := transpose(M)[:, 1]
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M1 := T(6, 0)*M
x1 := transpose(M1)[:, 0]
y1 := transpose(M1)[:, 1]
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M2 := R(f_rad)*M1
M3 := T(-6, 0)*M2
x3 := transpose(M3)[:, 0]
y3 := transpose(M3)[:, 1]
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M4 := T(2, 3)*M3
x4 := transpose(M4)[:, 0]
y4 := transpose(M4)[:, 1]
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