x := transpose([9, 9, 1, 1])
y := transpose([1, 3, 1, 1])
t := 0, 0.1 .. 1
Rx(t) := (1 - 3*t^2 + 2*t^3)*x[0] + t^2*(3 - 2*t)*x[1] + t*(1 - 2*t + t^2)*x[2] - t^2*(1 - t)*x[3]
Ry(t) := (1 - 3*t^2 + 2*t^3)*y[0] + t^2*(3 - 2*t)*y[1] + t*(1 - 2*t + t^2)*y[2] - t^2*(1 - t)*y[3]
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A := [1, 0, 0, 0; 0, 0, 0, 1; -3, 3, 0, 0; 0, 0, -3, 3]
xE := A^-1*x
yE := A^-1*y
Bx(t) := (1 - t)^3*xE[0] + 3*(1 - t)^2*t*xE[1] + 3*(1 - t)*t^2*xE[2] + t^3*xE[3]
By(t) := (1 - t)^3*yE[0] + 3*(1 - t)^2*t*yE[1] + 3*(1 - t)*t^2*yE[2] + t^3*yE[3]
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