A := transpose([5, 0, 0, 1])
B := transpose([0, 0, 0, 1])
C := transpose([0, 5, 0, 1])
D := transpose([0, 0, 3, 1])
rv := 10
φvg := 45
φv := π*φvg/180
σvg := 30
σv := π*σvg/180
xLW := 100
yLW := 200
xHW := 800
yHW := 900
PIR := augment(A, B, C, D) = [5, 0, 0, 0; 0, 0, 5, 0; 0, 0, 0, 3; 1, 1, 1, 1]
# Матрица пересчёта мировых координат в видовые
KView := [
    -sin(φv), cos(φv), 0, 0;
    -cos(σv)*cos(φv), -cos(σv)*sin(φv), sin(σv), 0;
    -sin(σv)*cos(φv), -sin(σv)*sin(φv), -cos(σv), rv;
    0, 0, 0, 1
]
PIR_V := KView*PIR = [-3.53553, 0, 3.53553, 0; -3.06186, 0, -3.06186, 1.5; 8.23223, 10, 8.23223, 7.40192; 1, 1, 1, 1]
XV := transpose(PIR_V)[:, 0]
YV := transpose(PIR_V)[:, 1]
IV := transpose(PIR_V)[:, 3]
PXY := stack(transpose(XV), transpose(YV), transpose(IV)) = [-3.53553, 0, 3.53553, 0; -3.06186, 0, -3.06186, 1.5; 1, 1, 1, 1]
xL := min(XV) = -3.53553
yH := max(YV) = 1.5
xH := max(XV) = 3.53553
yL := min(YV) = -3.06186
ΔxW := xHW - xLW = 700
Δx := xH - xL = 7.07107
Δy := yH - yL = 4.56186
ΔyW := yHW - yLW = 700
kx := ΔxW/Δx = 98.9949
ky := ΔyW/Δy = 153.446
TSW := [kx, 0, xLW - kx*xL; 0, -ky, yHW + ky*yL; 0, 0, 1] = [98.9949, 0, 450; 0, -153.446, 430.169; 0, 0, 1]
M1W := TSW*PXY
MW := vectorize(round(M1W))
[xa, xb, xc, xd; ya, yb, yc, yd; q, q, q, q] := MW
RC := [rv*sin(σv)*cos(φv); rv*sin(σv)*sin(φv); rv*cos(σv)]
AC := [C[0]; C[1]; C[2]] - [A[0]; A[1]; A[2]]
AD := [D[0]; D[1]; D[2]] - [A[0]; A[1]; A[2]]
NADC := AC×AD
NADB := transpose([0, -1, 0])
NBDC := transpose([-1, 0, 0])
NABC := transpose([0, 0, -1])
-(-(-(-(-(-(-(-(-(-(-(-(-(-видимость)))))))))))))*граней - (-(-(-(-(-(-(-(-(-(-(-(-(-(-(-(-(-□)))))))))))))))))
q1 := RC*NADC = 322.572
q1 > 0*(-грань*видима)
q2 := RC*NADB = -3.53553
# q2 грань невидима
q3 := RC*NBDC = -3.53553
# грань невидима
q4 := RC*NABC = -8.66025
# грань невидима
X := transpose([xa, xd, xc])
Y := transpose([ya, yd, yc])
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