f(x) := e^(-|x/5|)*sin(x)
Δx := π/36
x1 := -4*π
x2 := 4*π
N := round((x2 - x1)/Δx) = 288
i := 0 .. N
Z[i] := 1
X[i] := x1 + i*Δx
Y[i] := f(X[i])
M1 := stack(transpose(X), transpose(Y), transpose(Z))
MYH := max(Y)
MXL := min(X)
MXH := max(X)
MYL := min(Y)
ΔMX := MXH - MXL
ΔMY := MYH - MYL
WYH := 600
WXL := 100
WXH := 800
WYL := 100
ΔWX := WXH - WXL
ΔWY := WYH - WYL
kx := ΔWX/ΔMX
ky := ΔWY/ΔMY
TMW := [kx, 0, WXL - kx*MXL; 0, -ky, WYH + ky*MYL; 0, 0, 1]
M2 := TMW*M1
XW := transpose(M2)[:, 0]
YW := (-transpose(M2))[:, 1]
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