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A := [-6; 1; 1]
B := [-4; 2; 1]
T(dx, dy) := [1, 0, -dx; 0, 1, -dy; 0, 0, 1]
R(f) := [cos(f), sin(f), 0; -sin(f), cos(f), 0; 0, 0, 1]
M := augment(A, B) = [-6, -4; 1, 2; 1, 1]
x := transpose(M)[:, 0]
y := transpose(M)[:, 1]
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M1 := T(-2, -3)*M
M2 := T(-3, -4)*M1
x1 := transpose(M2)[:, 0]
y1 := transpose(M2)[:, 1]
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