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A := [1; 2]
B := [10; 8]
C := [5; 7]
D := [8; 2]
T(dx, dy) := [1, 0, -dx; 0, 1, -dy; 0, 0, 1]
R(f) := [cos(f), sin(f), 0; -sin(f), cos(f), 0; 0, 0, 1]
M := augment(A, B) = [1, 10; 2, 8]
M1 := augment(C, D) = [5, 8; 7, 2]
x := transpose(M)[:, 0]
y := transpose(M)[:, 1]
x1 := transpose(M1)[:, 0]
y1 := transpose(M1)[:, 1]
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C = [5; 7]
A = [1; 2]
D = [8; 2]
B = [10; 8]
I := C + (D - C)*(1/3) = [6; 5.33333]
Q := A + (B - A)*5/9 = [6; 5.33333]
