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x[0] := 5
x[1] := 0
x[2] := 0
y[0] := 0
y[1] := 5
y[2] := 0
T(dx, dy, dz) := [1, 0, 0, -dx; 0, 1, 0, -dy; 0, 0, 1, -dz; 0, 0, 0, 1]
Roy(fi) := [cos(fi), 0, sin(fi), 0; 0, 1, 0, 0; -sin(fi), 0, cos(fi), 0; 0, 0, 0, 1]
z[0] := 0
z[1] := 0
z[2] := 10
fi := 30
fi_rad := fi*3.14/180 = 0.523333
Rsz(fi) := [cos(fi), sin(fi), 0, 0; -sin(fi), cos(fi), 0, 0; 0, 0, 1, 0; 0, 0, 0, 1]
A := transpose([x[0], y[0], z[0]]) = [5; 0; 0]
B := transpose([x[1], y[1], z[1]]) = [0; 5; 0]
C := transpose([x[2], y[2], z[2]]) = [0; 0; 10]
M := [x[0], x[1], x[2]; y[0], y[1], y[2]; z[0], z[1], z[2]; 1, 1, 1]
a := atan(y[1]/x[0]) = 0.785398
[dx; dy; dz; q] := M[:, 0]
M1 := T(dx, dy, dz)*M = [0, -5, -5; 0, 5, 0; 0, 0, 10; 1, 1, 1]
M2 := Rsz(a)*M1 = [0, 0, -3.53553; 0, 7.07107, 3.53553; 0, 0, 10; 1, 1, 1]
M3 := Roy(fi_rad)*M2 = [0, 0, 1.93537; 0, 7.07107, 3.53553; 0, 0, 10.4285; 1, 1, 1]
M4 := Rsz(-a)*M3 = [0, -5, -1.13149; 0, 5, 3.86851; 0, 0, 10.4285; 1, 1, 1]
M5 := T(-dx, -dy, -dz)*M4 = [5, 0, 3.86851; 0, 5, 3.86851; 0, 0, 10.4285; 1, 1, 1]
t := transpose(M)[:, 0]
u := transpose(M)[:, 1]
t1 := transpose(M5)[:, 0]
u1 := transpose(M5)[:, 1]
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