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x[1] := 2
x[2] := 0
x[3] := 0
y[1] := 0
y[2] := -10
y[3] := 0
z[1] := 0
z[2] := 0
z[3] := 2
fi := 90
fi_rad := fi*3.14/180 = 1.57
M := [x[1], x[2], x[3]; y[1], y[2], y[3]; z[1], z[2], z[3]; 1, 1, 1] = [2, 0, 0; 0, -10, 0; 0, 0, 2; 1, 1, 1]
t := transpose(M)[:, 0]
u := transpose(M)[:, 1]
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[dx; dy; dz; q] := M[:, 0]
T(dx, dy, dz) := [1, 0, 0, -dx; 0, 1, 0, -dy; 0, 0, 1, -dz; 0, 0, 0, 1]
Ry(f) := [cos(f), 0, -sin(f), 0; 0, 1, 0, 0; sin(f), 0, cos(f), 0; 0, 0, 0, 1]
Rz(f) := [cos(f), -sin(f), 0, 0; sin(f), cos(f), 0, 0; 0, 0, 1, 0; 0, 0, 0, 1]
a := atan(x[1]/z[3]) = 0.785398
a_grad := a*180/3.14 = 45.0228
M1 := T(-dx, -dy, -dz)*Ry(a)*Rz(fi)*Ry(-a)*T(dx, dy, dz)*M = [2, 7.76958, 0; 0, 3.21643, 0; 0, 7.76958, 2; 1, 1, 1]
