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x[1] := 5
x[2] := 0
x[3] := 0
y[1] := 0
y[2] := -4
y[3] := 0
z[1] := 0
z[2] := 0
z[3] := 8
M := [x[1], x[2], x[3]; y[1], y[2], y[3]; z[1], z[2], z[3]; 1, 1, 1] = [5, 0, 0; 0, -4, 0; 0, 0, 8; 1, 1, 1]
Rsz(fi) := [cos(fi), sin(fi), 0, 0; -sin(fi), cos(fi), 0, 0; 0, 0, 1, 0; 0, 0, 0, 1]
Rsy(fi) := [cos(fi), 0, -sin(fi), 0; 0, 1, 0, 0; sin(fi), 0, cos(fi), 0; 0, 0, 0, 1]
T(dx, dy, dz) := [1, 0, 0, -dx; 0, 1, 0, -dy; 0, 0, 1, -dz; 0, 0, 0, 1]
fi1 := 30
fi2 := 45
fi1_rad := fi1*3.14/180 = 0.523333
fi2_rad := fi2*3.14/180 = 0.785
M1 := Rsz(fi2_rad)*M = [3.53694, -2.8273, 0; -3.53413, -2.82955, 0; 0, 0, 8; 1, 1, 1]
M2 := T(0, 0, 10)*M1 = [3.53694, -2.8273, 0; -3.53413, -2.82955, 0; -10, -10, -2; 1, 1, 1]
M3 := Rsy(-fi1_rad)*M2 = [-1.93415, -7.44659, -0.99954; -3.53413, -2.82955, 0; -10.4292, -7.24858, -1.73232; 1, 1, 1]
