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x[1] := 1
y[1] := 1
z[1] := 1
x[2] := 5
y[2] := 5
z[2] := 1
T(dx, dy, dz) := [1, 0, 0, -dx; 0, 1, 0, -dy; 0, 0, 1, -dz; 0, 0, 0, 1]
T2(dx, dy) := [1, 0, -dx; 0, 1, -dy; 0, 0, 1]
M := [x[1], x[2]; y[1], y[2]; z[1], z[2]; 1, 1] = [1, 5; 1, 5; 1, 1; 1, 1]
t := transpose(M)[:, 0]
u := transpose(M)[:, 1]
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M1 := T(3, 3, 1)*M = [-2, 2; -2, 2; 0, 0; 1, 1]
M2 := [-2, 2; -2, 2; 1, 1]
fi_rad := 45*3.14/180 = 0.785
R(fi) := [cos(fi), sin(fi), 0; -sin(fi), cos(fi), 0; 0, 0, 1]
M3 := R(-fi_rad)*M2 = [-0.00112618, 0.00112618; -2.82843, 2.82843; 1, 1]
M3 := T2(2, 0)*M3 = [-2.00113, -1.99887; -2.82843, 2.82843; 1, 1]
M4 := T2(-2, 0)*M3 = [-0.00112618, 0.00112618; -2.82843, 2.82843; 1, 1]
