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x[0] := 1
x[1] := 0
x[2] := 0
x[3] := 0
y[0] := 0
y[1] := 0
y[2] := 1
y[3] := 0
z[0] := 0
z[1] := 0
z[2] := 0
z[3] := 2
A := transpose([x[0], y[0], z[0]]) = [1; 0; 0]
B := transpose([x[1], y[1], z[1]]) = [0; 0; 0]
C := transpose([x[2], y[2], z[2]]) = [0; 1; 0]
D := transpose([x[3], y[3], z[3]]) = [0; 0; 2]
r := 1
fi := 45
gamma := 30
fi_rad := fi*3.14/180 = 0.785
gamma_rad := gamma*3.14/180 = 0.523333
BC := C - B = [0; 1; 0]
AC := C - A = [-1; 1; 0]
BA := A - B = [1; 0; 0]
BD := D - B = [0; 0; 2]
AD := D - A = [-1; 0; 2]
N1 := AC×AD = [2; 2; 1]
N2 := BA×BD = [0; -2; 0]
N3 := BC×BA = [0; 0; -1]
N4 := BD×BC = [-2; 0; 0]
Xr := r*sin(gamma_rad)*cos(fi_rad) = 0.353532
Yr := r*sin(gamma_rad)*sin(fi_rad) = 0.35325
Zr := r*cos(gamma_rad) = 0.866158
R := [Xr; Yr; Zr] = [0.353532; 0.35325; 0.866158]
