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x[1] := 1
x[2] := -1
x[3] := -1
x[4] := 1
x[5] := 0
y[1] := -1
y[2] := -1
y[3] := 1
y[4] := 1
y[5] := 0
z[1] := 0
z[2] := 0
z[3] := 0
z[4] := 0
z[5] := 5
A := transpose([x[1], y[1], z[1]]) = [1; -1; 0]
B := transpose([x[2], y[2], z[2]]) = [-1; -1; 0]
C := transpose([x[3], y[3], z[3]]) = [-1; 1; 0]
D := transpose([x[4], y[4], z[4]]) = [1; 1; 0]
E := transpose([x[5], y[5], z[5]]) = [0; 0; 5]
r := 1
fi := 30
gamma := 45
fi_rad := fi*3.14/180 = 0.523333
gamma_rad := gamma*3.14/180 = 0.785
AD := D - A = [0; 2; 0]
DC := C - D = [-2; 0; 0]
AE := E - A = [-1; 1; 5]
DE := E - D = [-1; -1; 5]
N1 := AD×AE = [10; 0; 2]
N2 := DC×DE = [0; 10; 2]
Xr := r*sin(gamma_rad)*cos(fi_rad) = 0.612222
Yr := r*sin(fi_rad)*sin(gamma_rad) = 0.35325
Zr := r*cos(gamma_rad) = 0.707388
R := [Xr; Yr; Zr] = [0.612222; 0.35325; 0.707388]
cos_a1 := R*N1/(|R|*|N1|) = 0.739064
cos_a2 := R*N2/(|R|*|N2|) = 0.48512
