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A := [2; 1; 1]
B := [10; 5; 1]
C := [3; 7; 1]
D := [8; 1; 1]
M1 := augment(A, B) = [2, 10; 1, 5; 1, 1]
M2 := augment(C, D) = [3, 8; 7, 1; 1, 1]
x := transpose(M1)[:, 0]
y := transpose(M1)[:, 1]
x1 := transpose(M2)[:, 0]
y1 := transpose(M2)[:, 1]
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ORIGIN := 1
t := 1
s := 1
Given
(10 - 2)*t - (8 - 3)*s == 3 - 2
(5 - 1)*t - (1 - 7)*s == 7 - 1
Find(t, s) → [9/17; 11/17]
C = [3; 7; 1]
A = [2; 1; 1]
B = [10; 5; 1]
D = [8; 1; 1]
I := C + (D - C)*(11/17) = [6.23529; 3.11765; 1]
Q := A + (B - A)*(9/17) = [6.23529; 3.11765; 1]
