A := [6; 8; 1]
B := [8; 6; 1]
C := A
T(dx, dy) := [1, 0, -dx; 0, 1, -dy; 0, 0, 1]
R(k) := [cos(k), sin(k), 0; -sin(k), cos(k), 0; 0, 0, 1]
M := augment(A, B) = [6, 8; 8, 6; 1, 1]
x := transpose(M)[:, 0]
y := transpose(M)[:, 1]
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f1 := 45
f2 := 60
f1_rad := f1*3.14/180 = 0.785
f2_rad := f2*3.14/180 = 1.04667
M1 := T(7, 7)*M
M2 := R(-f1_rad)*M1
M3 := T(-7, -7)*M2
x1 := transpose(M3)[:, 0]
y1 := transpose(M3)[:, 1]
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M4 := T(0, 0)*M3
M5 := R(f2_rad)*M4
M6 := T(-0, -0)*M5
x2 := transpose(M6)[:, 0]
y2 := transpose(M6)[:, 1]
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