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A := [-2; 1]
B := [15; 5]
C := [-3; 7]
D := [5; 1]
M1 := augment(A, B) = [-2, 15; 1, 5]
M2 := augment(C, D) = [-3, 5; 7, 1]
x := transpose(M1)[:, 0]
y := transpose(M1)[:, 1]
x1 := transpose(M2)[:, 0]
y1 := transpose(M2)[:, 1]
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ORIGIN := 1
t := 1
s := 1
Given
(15 - (-2))*t - (5 - (-3))*s == -3 + 2
(5 - 1)*t - (1 - 7)*s == 7 - 1
Find(t, s) → [21/67; 53/67]
I := C + (D - C)*(53/67) = [3.32836; 2.25373]
Q := A + (B - A)*(21/67) = [3.32836; 2.25373]
