A := [-7; 5; 1]
B := [-7; 7; 1]
C := [-5; 7; 1]
D := A
M := augment(A, B, C, D) = [-7, -7, -5, -7; 5, 7, 7, 5; 1, 1, 1, 1]
T(dx, dy) := [1, 0, -dx; 0, 1, -dy; 0, 0, 1]
R(f) := [cos(f), sin(f), 0; -sin(f), cos(f), 0; 0, 0, 1]
x := transpose(M)[:, 0]
y := transpose(M)[:, 1]
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M1 := T(-7, 7)*M
f1 := 45
f1_rad := f1*3.14/180 = 0.785
M3 := R(f1_rad)*M1
M4 := T(3, -2)*M3
M5 := T(7, -7)*M4
x1 := transpose(M5)[:, 0]
y1 := transpose(M5)[:, 1]
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