A := [-1; -1; 1]
B := [-1; 1; 1]
C := [1; 1; 1]
D := [1; -1; 1]
E := A
T(dx, dy) := [1, 0, -dx; 0, 1, -dy; 0, 0, 1]
R(f) := [cos(f), sin(f), 0; -sin(f), cos(f), 0; 0, 0, 1]
M := augment(A, B, C, D, E) = [-1, -1, 1, 1, -1; -1, 1, 1, -1, -1; 1, 1, 1, 1, 1]
x := transpose(M)[:, 0]
y := transpose(M)[:, 1]
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f := 45
f_rad := f*3.14/180
M1 := T(0, 0)*M
M2 := R(f_rad)*M1
M3 := T(-10, -10)*M2
M4 := T(0, 0)*M3
x1 := transpose(M4)[:, 0]
y1 := transpose(M4)[:, 1]
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