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A := [-4; 3; 1]
B := [-4; 5; 1]
T(dx, dy) := [1, 0, -dx; 0, 1, -dy; 0, 0, 1]
R(f) := [cos(f), sin(f), 0; -sin(f), cos(f), 0; 0, 0, 1]
M := augment(A, B) = [-4, -4; 3, 5; 1, 1]
x := transpose(M)[:, 0]
y := transpose(M)[:, 1]
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f1 := 90
f2 := 45
f1_rad := f1*3.14/180 = 1.57
f2_rad := f2*3.14/180 = 0.785
M1 := T(-4, 4)*M
M2 := R(f1_rad)*M1
M3 := T(4, -4)*M2
M4 := T(0, 0)*M3
M5 := R(f2_rad)*M4
x1 := transpose(M5)[:, 0]
y1 := transpose(M5)[:, 1]
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