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A := [4; 2; 1]
B := [6; 4; 1]
C := [6; 2; 1]
D := A
T(dx, dy) := [1, 0, -dx; 0, 1, -dy; 0, 0, 1]
R(f) := [cos(f), sin(f), 0; -sin(f), cos(f), 0; 0, 0, 1]
M := augment(A, B, C, D) = [4, 6, 6, 4; 2, 4, 2, 2; 1, 1, 1, 1]
x := transpose(M)[:, 0]
y := transpose(M)[:, 1]
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M1 := T(6, 4)*M
f1 := 45
f1_rad := f1*3.14/180 = 0.785
M2 := R(-f1_rad)*M1
M4 := T(-6, -4)*M2
x1 := transpose(M4)[:, 0]
y1 := transpose(M4)[:, 1]
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