A := [5; 0; 0; 1]
B := [0; 0; 0; 1]
C := [0; 5; 0; 1]
D := [0; 0; 10; 1]
M1 := augment(A, B, C, D) = [5, 0, 0, 0; 0, 0, 5, 0; 0, 0, 0, 10; 1, 1, 1, 1]
rv := 10
fi := 20
gamma := 45
fi_rad := fi*3.14/180 = 0.348889
gamma_rad := gamma*3.14/180 = 0.785
R := [
    -sin(fi_rad), cos(fi_rad), 0, 0;
    -cos(gamma_rad)*cos(fi_rad), -cos(gamma_rad)*sin(fi_rad), sin(gamma_rad), 0;
    -sin(gamma_rad)*cos(fi_rad), -sin(gamma_rad)*sin(fi_rad), -cos(fi_rad), rv;
    0, 0, 0, 1
]
MV := R*M1 = [
    -1.70927, 0, 4.69877, 0;
    -3.32385, 0, -1.20912, 7.06825;
    6.67879, 10, 8.79185, 0.602469;
    1, 1, 1, 1
]
XK := transpose(MV)[:, 0] = [-1.70927; 0; 4.69877; 0]
YK := transpose(MV)[:, 1]
ZK := transpose(MV)[:, 3]
M2 := stack(transpose(XK), transpose(YK), transpose(ZK))
XLW := 100
YHW := 200
XHW := 800
YLW := 900
XLM := min(XK)
YHM := max(YK)
XHM := max(XK)
YLM := min(YK)
WX := XHW - XLM
WY := YHW - YLW
MX := XHM - XLM
MY := YHM - YLM
kx := WX/MX
ky := WY/MY
TMW := [kx, 0, XLW - kx*XLM; 0, -ky, YHW + ky*YLM; 0, 0, 1]
M3 := TMW*M2 = [100, 313.847, 901.709, 313.847; 200, 423.891, 342.446, 900; 1, 1, 1, 1]
MW := vectorize(round(M3))
[xa, xb, xc, xd; ya, yb, yc, yd; q, q, q, q] := MW
X := transpose([xa, xb, xc, xa, xd, xb, xd, xc])
Y := -transpose([ya, yb, yc, ya, yd, yb, yd, yc])
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