A := [6; 6; 1]
B := [6; 8; 1]
C := [8; 6; 1]
D := A
φ := 90
φ_rad := π*φ/180
M1 := augment(A, B, C, D) = [6, 6, 8, 6; 6, 8, 6, 6; 1, 1, 1, 1]
X := transpose(M1)[:, 0]
Y := transpose(M1)[:, 1]
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R(φ) := [cos(φ), -sin(φ), 0; sin(φ), cos(φ), 0; 0, 0, 1]
T(dx, dy) := [1, 0, -dx; 0, 1, -dy; 0, 0, 1]
M2 := T(6, 6)*M1
X := transpose(M2)[:, 0]
Y := transpose(M2)[:, 1]
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M3 := R(-φ_rad)*M2
M4 := T(-6, -6)*M3
Y := transpose(M4)[:, 1]
X := transpose(M4)[:, 0]
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M5 := T(-2, -3)*M4
Y := transpose(M5)[:, 1]
X := transpose(M5)[:, 0]
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