X[0] := 3
X[1] := 0
X[2] := 0
Y[0] := 0
Y[1] := -3
Y[2] := 0
Z[0] := 0
Z[1] := 0
Z[2] := 3
M1 := [X[0], X[1], X[2]; Y[0], Y[1], Y[2]; Z[0], Z[1], Z[2]; 1, 1, 1]
T(Δx, Δy, Δz) := [1, 0, 0, Δx; 0, 1, 0, Δy; 0, 0, 1, Δz; 0, 0, 0, 1]
R(φ) := [cos(φ), -sin(φ), 0, 0; sin(φ), cos(φ), 0, 0; 0, 0, 1, 0; 0, 0, 0, 1]
θ := 90
θ_rad := π*θ/180
M2 := R(θ_rad)*M1
M3 := T(0, 0, 3)*M2
