T(dx, dy) := [1, 0, -dx; 0, 1, -dy; 0, 0, 1]
R(φ) := [cos(φ), -sin(φ), 0; sin(φ), cos(φ), 0; 0, 0, 1]
X[1] := 5
X[0] := 2
Y[1] := 6
Y[0] := 5
M1 := [X[0], X[1]; Y[0], Y[1]; 1, 1]
M2 := T(X[0], Y[0])*M1
M3 := R(-π*45/180)*M2
M4 := T((-X)[0], -Y[0])*M3
X := transpose(M4)[:, 0]
Y := transpose(M4)[:, 1]
X1 := X[1] = 4.82843
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Y1 := Y[1] = 3.58579
M5 := T(X[1], Y[1])*M4
M6 := R(π*45/180)*M5
M7 := T(-X[1], -Y[1])*M6
X := transpose(M7)[:, 0]
Y := transpose(M7)[:, 1]
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