R[SY]*d := [cos(d), 0, -sin(d), 0; 0, 1, 0, 0; sin(d), 0, cos(d), 0; 0, 0, 0, 1]  # error: Здесь требуется имя.
T[S]*(dx, dy, dz) := [1, 0, 0, -dx; 0, 1, 0, -dy; 0, 0, 1, -dz; 0, 0, 0, 1]  # error: Здесь требуется имя.
R[OX]*d := [1, 0, 0, 0; 0, cos(d), -sin*d, 0; 0, sin(d), cos(d), 0; 0, 0, 0, 1]  # error: Здесь требуется имя.
fi_grad := 30
fi := fi_grad*π/180
M := [5, 0, 0; 0, 5, 0; 0, 0, 10; 1, 1, 1]
[dx; dy; dz; q] := M[:, 0]
z3 := M[2, 2]
x1 := M[0, 0]
a := x1/z3
a_grad := a*180/π
a_grad = 28.6479
M1 := T[S]*(-dx, -dy, -dz)*R[SY]*a*R[OX]*fi*R[SY]*(-a)*T[S]*(dx, dy, dz)*M  # error: Эта переменная неопределена.
M1 =  # error: Эта переменная неопределена.
