A1 := [3, 7, 8; 6, 5, 1; 0, 2, 1]
B1 := [9, 2, 1; 3, 0, 4; 5, 7, 5]
V1 := [8; 4; 5]
V2 := [1; 6; 7]
C1 := A1 + B1 = [12, 9, 9; 9, 5, 5; 5, 9, 6]
C2 := A1*B1 = [88, 62, 71; 74, 19, 31; 11, 7, 13]
D := A1*V1 = [92; 73; 13]
q := transpose(V1)*V2 = 67
p := transpose(V1)*A1*V2 = 1075
x := V2[0, 0]*sin(V2[1, 0])*cos(V2[2, 0]) = -0.210652
V1×V2 = [-2; -51; 44]
V1*V2 = 67
|V2| → sqrt(86)
V1*V2/(|V1|*|V2|) → 67*sqrt(86)*sqrt(105)/9030 = 0.705068
y := V2[0, 0]*sin(V2[1, 0])*sin(V2[2, 0]) = -0.183572
z := V2[0, 0]*cos(V2[1, 0]) = 0.96017
