r := 10
x := 0
y := r
d := 1 - r
p := 3
q := -2*r + 5
i := 0
XPoints :=
    while y > x
        if d < 0
            d ← d + p
            p ← p + 2
            q ← q + 2
            x ← x + 1
        otherwise
            d ← d + q
            q ← q + 2
            p ← p + 2
            x ← x + 1
            y ← y - 1
        mas[i] ← x
        mas[i + 1] ← y
        mas[i + 2] ← y
        mas[i + 3] ← x
        mas[i + 4] ← -x
        mas[i + 5] ← -y
        mas[i + 6] ← -y
        mas[i + 7] ← -x
        i ← i + 8
    return mas
YPoints :=
    while y > x
        if d < 0
            d ← d + p
            p ← p + 2
            q ← q + 2
            x ← x + 1
        otherwise
            d ← d + q
            q ← q + 2
            p ← p + 2
            x ← x + 1
            y ← y - 1
        mas[i] ← y
        mas[i + 1] ← x
        mas[i + 2] ← -x
        mas[i + 3] ← -y
        mas[i + 4] ← -y
        mas[i + 5] ← -x
        mas[i + 6] ← x
        mas[i + 7] ← y
        i ← i + 8
    return mas
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