D := transpose([-4, -3, 1])
B := transpose([0, 3, 1])
C := transpose([4, -3, 1])
A[1] := D
M := augment(D, B, C, A[1])
M = [-4, 0, 4, -4; -3, 3, -3, -3; 1, 1, 1, 1]
ϕ_grad := 90
ϕ_rad := ϕ_grad/180*π
X := transpose(M)[:, 0]
Y := transpose(M)[:, 1]
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R := [cos(ϕ_rad), -sin(ϕ_rad), 0; sin(ϕ_rad), cos(ϕ_rad), 0; 0, 0, 1]  # Поворот объекта на угол ϕ
M1 := R*M
X[1] := transpose(M1)[:, 0]
Y[1] := transpose(M1)[:, 1]
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M2 := R*M1
X[2] := transpose(M2)[:, 0]
Y[2] := transpose(M2)[:, 1]
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M3 := R*M2
X[3] := transpose(M3)[:, 0]
Y[3] := transpose(M3)[:, 1]
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