x[0] := 6
y[0] := 6  # Координаты точки A
x[1] := 6
y[1] := 8  # Координаты точки B
y[2] := 6  # Координаты точки C
x[2] := 8
x[3] := x[0]
y[3] := y[0]
P := [x[0], x[1], x[2], x[3]; y[0], y[1], y[2], y[3]; 1, 1, 1, 1]
X := transpose(P)[:, 0]
Y := transpose(P)[:, 1]
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# Смещение начала координат системы
# Поворот системы координат на угол ϕ
T(dx, dy) := [1, 0, -dx; 0, 1, -dy; 0, 0, 1]
R(ϕ) := [cos(ϕ), sin(ϕ), 0; -sin(ϕ), cos(ϕ), 0; 0, 0, 1]
ϕ := 90
ϕ_rad := ϕ*π/180
Δx := 2
Δy := 3
# I. Cмещаем сисстему координат в точку A
P1 := T(x[0], y[0])*P
P1 = [0, 0, 2, 0; 0, 2, 0, 0; 1, 1, 1, 1]
X[1] := transpose(P1)[:, 0]
Y[1] := transpose(P1)[:, 1]
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# II. Поворачиваем треугольник на 90 градусов по часовой стрелке
# это экивалентно повороту СК против часовой стрелки (в положительном направлении)
P2 := R(ϕ_rad)*P1
P2 = [0, 2, 0, 0; 0, 0, -2, 0; 1, 1, 1, 1]
X[2] := transpose(P2)[:, 0]
Y[2] := transpose(P2)[:, 1]
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# III. Cмещаем треугольник на (Δx, Δy), что эквивалентно смещению СК на (Δx, Δy)
P3 := T(-Δx, -Δy)*P2
P3 = [2, 4, 2, 2; 3, 3, 1, 3; 1, 1, 1, 1]
X[3] := transpose(P3)[:, 0]
Y[3] := transpose(P3)[:, 1]
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# IV. Cмещаем систему координат в исходное положение
P4 := T(-x[0], -y[0])*P3
P4 = [8, 10, 8, 8; 9, 9, 7, 9; 1, 1, 1, 1]
X4 := transpose(P4)[:, 0]
Y4 := transpose(P4)[:, 1]
X := transpose(P)[:, 0]
Y := transpose(P)[:, 1]
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