X[0] := 6
X[1] := 6
X[2] := 8
X[3] := 6
move(dx, dy) := [1, 0, -dx; 0, 1, -dy; 0, 0, 1]
Y[2] := 6
Y[3] := 6
Y[0] := 6
Y[1] := 8
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rotateM(fi) := [cos(fi), sin(fi), 0; -sin(fi), cos(fi), 0; 0, 0, 1]
fi := 90
fi_rad := (fi*π)/180
P := [X[0], X[1], X[2]; Y[0], Y[1], Y[2]; 1, 1, 1]
dx1 := 6
dy1 := 6
dx2 := 2
dy2 := 3
# Смещаем треугольник в точку А
P1 := move(dx1, dy1)*P
P1 = [0, 0, 2; 0, 2, 0; 1, 1, 1]
# Поворачиваем треугольник на 90 град по часовой стрелке. Т.е поворачиваем ск на 90 град против(в положит. направ)
P2 := rotateM(fi_rad)*P1
P2 = [0, 2, 0; 0, 0, -2; 1, 1, 1]
# Смещаем треугл на 3 по х и на 2 по у. Т.е смешаем ск на -3 по х и на -2 по у
P3 := move(-dx2, -dy2)*P2
P3 = [2, 4, 2; 3, 3, 1; 1, 1, 1]
# Смещаем треугл в исходную позицию. Т е смещаем СК на -6;-6
P4 := move(-dx1, -dy1)*P3
P4 = [8, 10, 8; 9, 9, 7; 1, 1, 1]
V[1] := P4[0, 1]
V[3] := P4[0, 0]
V[0] := P4[0, 0]
V[2] := P4[0, 2]
U[0] := P4[1, 0]
U[1] := P4[1, 1]
U[2] := P4[1, 2]
U[3] := P4[1, 0]
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