R(f) := [cos(f), sin(f), 0; -sin(f), cos(f), 0; 0, 0, 1]
D(f) := [cos(f), -sin(f), 0; sin(f), cos(f), 0; 0, 0, 1]
T(dx, dy) := [1, 0, -dx; 0, 1, -dy; 0, 0, 1]
dx2 := 3
dy2 := 4
dx1 := 2
dy1 := 3
X[1] := -4
X[0] := -6
Y[1] := 2
Y[0] := 1
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P := [X[0], X[1]; Y[0], Y[1]; 1, 1]
# Находим координаты после смещения
# по X на 2 и по Y на 3
P1 := T(-dx1, -dy1)*P
P1 = [-4, -2; 4, 5; 1, 1]
# Находим координаты после смещения по X на 3 и по Y на 4
P2 := T(-dx2, -dy2)*P1
P2 = [-1, 1; 8, 9; 1, 1]
V[0] := P2[0, 0]
V[1] := P2[0, 1]
U[0] := P2[1, 0]
U[1] := P2[1, 1]
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