RSY(d) := [cos(d), 0, -sin(d), 0; 0, 1, 0, 0; sin(d), 0, cos(d), 0; 0, 0, 0, 1]
T(dx, dy, dz) := [1, 0, 0, -dx; 0, 1, 0, -dy; 0, 0, 1, -dz; 0, 0, 0, 1]
ROX(d) := [1, 0, 0, 0; 0, cos(d), -sin(d), 0; 0, sin(d), cos(d), 0; 0, 0, 0, 1]
fi_grad := 30
fi := fi_grad*π/180
M := [5, 0, 0; 0, 5, 0; 0, 0, 10; 1, 1, 1]
[dx; dy; dz; q] := M[:, 0]
z3 := M[2, 2]
x1 := M[0, 0]
a := x1/z3
a_grad := a*180/π
a_grad = 28.6479
M1 := T(-dx, -dy, -dz)*RSY(a)*ROX(fi)*RSY(-a)*T(dx, dy, dz)*M
M1 = [5, -1.04459, 0.717648; 0, 3.13156, -5.58648; 0, 1.91212, 8.68635; 1, 1, 1]
