X[0] := -7
X[1] := -7
X[2] := -5
X[3] := -7
move(dx, dy) := [1, 0, -dx; 0, 1, -dy; 0, 0, 1]
Y[2] := 7
Y[3] := 5
Y[0] := 5
Y[1] := 7
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rotateM(fi) := [cos(fi), sin(fi), 0; -sin(fi), cos(fi), 0; 0, 0, 1]
fi := 45
fi_rad := (fi*π)/180
P := [X[0], X[1], X[2]; Y[0], Y[1], Y[2]; 1, 1, 1]
dx1 := -7
dy1 := 7
dx2 := 3
dy2 := -2
# Смещаем СК в точку В
P1 := move(dx1, dy1)*P
P1 = [0, 0, 2; -2, 0, 0; 1, 1, 1]
# Поворачиваем треугольник на 45 град по часовой стрелке. Т.е поворачиваем СК на 45 град против(в положит. направ)
P2 := rotateM(fi_rad)*P1
P2 = [-1.41421, 0, 1.41421; -1.41421, 0, -1.41421; 1, 1, 1]
# Смещаем треугл на 2 по х и на -3 по у. Т.е смешаем ск на -2 по х и на 2 по у
P3 := move(-dx2, -dy2)*P2
P3 = [1.58579, 3, 4.41421; -3.41421, -2, -3.41421; 1, 1, 1]
# Смещаем треугл в исходную позицию. Т е смещаем СК на -6;-6
P4 := move(-dx1, -dy1)*P3
P4 = [-5.41421, -4, -2.58579; 3.58579, 5, 3.58579; 1, 1, 1]
V[1] := P4[0, 1]
V[3] := P4[0, 0]
V[0] := P4[0, 0]
V[2] := P4[0, 2]
U[0] := P4[1, 0]
U[1] := P4[1, 1]
U[2] := P4[1, 2]
U[3] := P4[1, 0]
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