X[0] := 2
X[1] := 5
move(dx, dy) := [1, 0, -dx; 0, 1, -dy; 0, 0, 1]
Y[1] := 6
Y[0] := 5
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rotateM(fi) := [cos(fi), sin(fi), 0; -sin(fi), cos(fi), 0; 0, 0, 1]
P := [X[0], X[1]; Y[0], Y[1]; 1, 1]
P = [2, 5; 5, 6; 1, 1]
fi1 := 45
fi2 := 45
fi_rad1 := (fi1*π)/180
fi_rad2 := (fi2*π)/180
dx1 := X[0]
dy1 := Y[0]
dx2 := X[1]
dy2 := Y[1]
# Смещаем отрезок. Точку A делаем началом СК
P1 := move(dx1, dy1)*P
P1 = [0, 3; 0, 1; 1, 1]
# Вращаем отрезок на 45 по часовой. Т.е вращаем СК на 45 против часовой
P2 := rotateM(fi_rad1)*P1
P2 = [0, 2.82843; 0, -1.41421; 1, 1]
P3 := move(-dx1, -dy1)*P2
# Смещаем отрезок. Точку B делаем началом СК
P4 := move(dx2, dy2)*P3
P3 = [2, 4.82843; 5, 3.58579; 1, 1]
# Вращаем относительно B на 45 против часовой т. е вращаем СК на 45 по часовой
P5 := rotateM(-fi_rad2)*P4
P4 = [-3, -0.171573; -1, -2.41421; 1, 1]
# Смещаем отрезок. Точку B делаем началом СК
P6 := move(-dx2, -dy2)*P5
P6 = [3.58579, 6.58579; 3.17157, 4.17157; 1, 1]
V[1] := P6[0, 1]
V[0] := P6[0, 0]
V[2] := P6[0, 0]
U[0] := P6[1, 0]
U[1] := P6[1, 1]
U[2] := P6[1, 0]
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