R(f) := [cos(f), sin(f), 0; -sin(f), cos(f), 0; 0, 0, 1]
D(f) := [cos(f), -sin(f), 0; sin(f), cos(f), 0; 0, 0, 1]
T(dx, dy) := [1, 0, -dx; 0, 1, -dy; 0, 0, 1]
# Находим координаты середины отрезка АВ
dx1 := -4
dy1 := 4
X[2] := -4
X[1] := -4
X[0] := -4
Y[2] := 5
Y[1] := 4
Y[0] := 3
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P := [X[0], X[1], X[2]; Y[0], Y[1], Y[2]; 1, 1, 1]
# Смещаем систему координат
# в середину отрезка
P1 := T(dx1, dy1)*P
P1 = [0, 0, 0; -1, 0, 1; 1, 1, 1]
a := 90
b := 45
f := a*π/180
k := b*π/180
# Относительно середины отрезка поворачиваем на 90 градусов против часовой
P2 := D(f)*P1
P2 = [1, 0, -1; 0, 0, 0; 1, 1, 1]
# Смещаем систему координат в точку О
P3 := T(-dx1, -dy1)*P2
P3 = [-3, -4, -5; 4, 4, 4; 1, 1, 1]
# Относительно точки О поворачиваем
# на 45 градусов по часовой стрелке
P4 := R(k)*P3
P4 = [0.707107, 0, -0.707107; 4.94975, 5.65685, 6.36396; 1, 1, 1]
V[0] := P4[0, 0]
V[1] := P4[0, 1]
V[2] := P4[0, 2]
U[0] := P4[1, 0]
U[1] := P4[1, 1]
U[2] := P4[1, 2]
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