R(f) := [cos(f), sin(f), 0; -sin(f), cos(f), 0; 0, 0, 1]
D(f) := [cos(f), -sin(f), 0; sin(f), cos(f), 0; 0, 0, 1]
T(dx, dy) := [1, 0, -dx; 0, 1, -dy; 0, 0, 1]
dx2 := 1
dy2 := 2
dy1 := 4
dx1 := 6
X[3] := 4
X[2] := 6
X[1] := 6
X[0] := 4
Y[2] := 2
Y[3] := 2
Y[1] := 4
Y[0] := 2
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P := [X[0], X[1], X[2]; Y[0], Y[1], Y[2]; 1, 1, 1]
# Смещаем систему координат
# в точку B
P1 := T(dx1, dy1)*P
P1 = [-2, 0, 0; -2, 0, -2; 1, 1, 1]
a := 45
f := a*π/180
# Относительно точки B поворачиваем на 45 градусов против часовой
P2 := D(f)*P1
P2 = [0, 0, 1.41421; -2.82843, 0, -1.41421; 1, 1, 1]
# Смещаем треугольник по Х на 1 и по Y на 2
P3 := T(-dx2, -dy2)*P2
P3 = [1, 1, 2.41421; -0.828427, 2, 0.585786; 1, 1, 1]
# Возвращаем треугольник в исходную систему координат
P4 := T(-dx1, -dy1)*P3
P4 = [7, 7, 8.41421; 3.17157, 6, 4.58579; 1, 1, 1]
V[0] := P4[0, 0]
V[1] := P4[0, 1]
V[2] := P4[0, 2]
V[3] := P4[0, 0]
U[0] := P4[1, 0]
U[1] := P4[1, 1]
U[2] := P4[1, 2]
U[3] := P4[1, 0]
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