x[1] := 4
y[1] := 10
x[2] := 4
y[2] := 6
x[3] := 12
y[3] := 6
x[4] := 12
y[4] := 10
x[5] := x[1]
y[5] := y[1]
x[6] := 2
y[6] := 2  # - Левый верхний угол
x[7] := 14
y[7] := 12  # -Правый нижний угол
Z[1] := transpose([x[1], x[2], x[3], x[4]])
Z[2] := transpose([y[1], y[2], y[3], y[4]])
x[8] := min(Z[1])
y[8] := max(Z[2])  # - Левый верхний угол в МСК
y[8] = 10
x[8] = 4
y[9] := min(Z[2])  # - Правый нижний угол в МСК
x[9] := max(Z[1])
y[9] = 6
x[9] = 12
Δx[1] := x[7] - x[6]  # Ширина области отображения в оконных координатах
Δx[1] = 12
Δy[1] := y[7] - y[6]  # Высота области отображения в оконных координатах
Δy[1] = 10
Δx[2] := x[9] - x[8]  # Ширина области отображения в мировых координатах
Δx[2] = 8
Δy[2] := y[8] - y[9]  # Высота области отображения в мировых координатах
Δy[2] = 4
k[1] := Δx[1]/Δx[2]
k[2] := Δy[1]/Δy[2]  # Коэффициенты
k[1] = 1.5
k[2] = 2.5
T := [k[1], 0, x[6] - k[1]*x[8]; 0, -k[2], y[6] - k[2]*y[9]; 0, 0, 1]  # Матрица пересчёта из МСК в ОСК
T = [1.5, 0, -4; 0, -2.5, -13; 0, 0, 1]
q := 1
[x[10]; y[10]; q] := T*[x[1]; y[1]; 1]
[x[20]; y[20]; q] := T*[x[2]; y[2]; 1]
[x[30]; y[30]; q] := T*[x[3]; y[3]; 1]
[x[40]; y[40]; q] := T*[x[4]; y[4]; 1]
x[50] := x[10]
y[50] := y[10]
[x[40]; y[40]; q] = [14; -38; 1]
[x[30]; y[30]; q] = [14; -28; 1]
[x[10]; y[10]; q] = [2; -38; 1]
[x[20]; y[20]; q] = [2; -28; 1]
X[1] := transpose([x[10], x[20], x[30], x[40], x[50]])
Y[1] := transpose([y[10], y[20], y[30], y[40], y[50]])
X[1] = [2; 2; 14; 14; 2]
Y[1] = [-38; -28; -28; -38; -38]
x[2] := 4
y[2] := 6
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Y := transpose([y[1], y[2], y[3], y[4], y[5]])
X := transpose([x[1], x[2], x[3], x[4], x[5]])
Y = [10; 6; 6; 10; 10]
X = [4; 4; 12; 12; 4]
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