Координаты
A := transpose([7, 0, 0, 1])
B := transpose([0, 0, 0, 1])
C := transpose([0, 7, 0, 1])
D := transpose([0, 0, 7, 1])
E := transpose([3, 0, 7, 1])
F := transpose([0, 3, 7, 1])
Положение  камеры
r_v := 15
ϕ_v_grad := 50
ϕ_v_rad := ϕ_v_grad/180*π  # от X
θ_v_grad := 240
θ_v_rad := θ_v_grad/180*π  # от Z
область отображения пирамиды в окне Windows
X_L_W := 200
Y_L_W := 100  # Левый верхний угол
# Правый нижний угол
X_R_W := 700
Y_R_W := 500
PIR := augment(A, B, C, D, E, F)
PIR = [7, 0, 0, 0, 3, 0; 0, 0, 7, 0, 0, 3; 0, 0, 0, 7, 7, 7; 1, 1, 1, 1, 1, 1]
# Матрица пересчета из мировой в видовую
K_VIEW := [
    -sin(ϕ_v_rad), cos(ϕ_v_rad), 0, 0;
    -cos(θ_v_rad)*cos(ϕ_v_rad), -cos(θ_v_rad)*sin(ϕ_v_rad), sin(θ_v_rad), 0;
    -sin(θ_v_rad)*cos(ϕ_v_rad), -sin(θ_v_rad)*sin(ϕ_v_rad), -cos(θ_v_rad), r_v;
    0, 0, 0, 1
]
# Координаты вершин пирамиды в видовой ск
PIR_V := K_VIEW*PIR
PIR_V = [
    -5.36231, 0, 4.49951, 0, -2.29813, 1.92836;
    2.24976, 0, 2.68116, -6.06218, -5.098, -4.91311;
    18.8967, 15, 19.6439, 18.5, 20.17, 20.4902;
    1, 1, 1, 1, 1, 1
]
# Координаты проекции вершин пирамиды на картинную плоскость
X_V := transpose(PIR_V)[:, 0]
Y_V := transpose(PIR_V)[:, 1]
I_V := transpose(PIR_V)[:, 3]
# КОЭФФИЦИЕНТ β = 1
X_V = [-5.36231; 0; 4.49951; 0; -2.29813; 1.92836]
Y_V = [2.24976; 0; 2.68116; -6.06218; -5.098; -4.91311]
I_V = [1; 1; 1; 1; 1; 1]
# Матрица из координат проекции вершин пирамиды на картинную плоскость
P_XY := stack(transpose(X_V), transpose(Y_V), transpose(I_V))
P_XY = [
    -5.36231, 0, 4.49951, 0, -2.29813, 1.92836;
    2.24976, 0, 2.68116, -6.06218, -5.098, -4.91311;
    1, 1, 1, 1, 1, 1
]
# Габаритная область проекции пирамиды на плоскость хv-xy видовой система координат -картинную плоскость
X_L := min(X_V)
Y_L := max(Y_V)
X_L = -5.36231
Y_L = 2.68116
X_R := max(X_V)
Y_R := min(Y_V)
Y_R = -6.06218
X_R = 4.49951
ΔX_W := X_R_W - X_L_W
ΔX_W = 500
ΔX := X_R - X_L
ΔX = 9.86182
ΔY_W := Y_R_W - Y_L_W
ΔY_W = 400
ΔY := Y_R - Y_L
ΔY = -8.74333
K_X := ΔX_W/ΔX
K_X = 50.7006
K_Y := ΔY_W/ΔY
K_Y = -45.7491
# Матрица пересчета координат из видовую в оконную
T_SW := [K_X, 0, X_L_W - K_X*X_L; 0, -K_Y, Y_R_W - K_Y*Y_L; 0, 0, 1]
T_SW = [50.7006, 0, 471.872; 0, 45.7491, 622.661; 0, 0, 1]
TR_W := T_SW*P_XY
TR_W_2 := vectorize(round(TR_W))
TR_W_2 = [200, 472, 700, 472, 355, 570; 726, 623, 745, 345, 389, 398; 1, 1, 1, 1, 1, 1]
[x_a, x_b, x_c, x_d, x_e, x_f; y_a, y_b, y_c, y_d, y_e, y_f; q_a, q_b, q_c, q_d, q_e, q_f] := TR_W_2
X := transpose([x_a, x_b, x_c, x_a, x_e, x_d, x_b, x_d, x_f, x_e, x_f, x_c])
Y := -transpose([y_a, y_b, y_c, y_a, y_e, y_d, y_b, y_d, y_f, y_e, y_f, y_c])
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