x[0] := 0
x[2] := 5
y[0] := 0
y[2] := 4
k[1] := (y[2] - y[0])/(x[2] - x[0])
t[0] := -1/2
k[1] = 0.8
t[1] := t[0] + k[1]  # т к т больше  0, то х=х0+1 и у=у0+1
t[1] = 0.3
D[1] := t[1] - 1
x[3] := x[0] + 1
y[3] := y[0] + 1
x[3] = 1
y[3] = 1
D[1] = -0.7
t[2] := D[1] + k[1]
t[2] = 0.1
x[4] := x[3] + 1
y[4] := y[3] + 1
D[2] := t[2] - 1
x[4] = 2
y[4] = 2
D[2] = -0.9
t[3] := D[2] + k[1]
t[3] = -0.1
x[5] := x[4] + 1
x[5] = 3
t[4] := t[3] + k[1]
x[6] := x[5] + 1
y[6] := y[4] + 1
D[4] := t[4] - 1
x[6] = 4
y[6] = 3
D[4] = -0.3
t[4] = 0.7
t[5] := D[4] + k[1]
x[7] := x[6] + 1
y[7] := y[6] + 1
x[7] = 5
y[7] = 4
t[5] = 0.5
E[1] := transpose([x[0], x[3], x[4], x[5], x[6], x[7]])
W[1] := transpose([y[0], y[3], y[4], y[4], y[6], y[7]])
E[1] = [0; 1; 2; 3; 4; 5]
W[1] = [0; 1; 2; 2; 3; 4]
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