A := [5; 5]
B := [10; 10]
C := [15; 1]
D := [3; 2]
E := [16; 5]
BC := C - B
ED := D - E
ABC := transpose(augment(A, B, C, A))
DE := transpose(augment(D, E))
AC := C - A
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# Найдем пересечение BC и DE
# Уравнение прямой BC
LBC(t) := A + BC*t
# Уравнение прямой DE
LED(u) := E + ED*u
# Решаем уравнение для точки пересечения BC и DE
Given
LBC(t) == LED(u)
[t; u] := Find(t, u) → [1/4; 3/4]
# В итоге координаты точек пересечения  BC и DE
LBC(t) → [25/4; 11/4]
LED(u) → [25/4; 11/4]
# Найдем пересечение AC и DE
# Уравнение прямой AC
LAC(t) := A + AC*t
# Уравнение прямой DE
LED(u) := E + ED*u
# Решаем уравнение для точки пересечения AC и DE
Given
LAC(t) == LED(u)
[t; u] := Find(t, u) → [33/82; 22/41]
# В итоге координаты точек пересечения  AC и DE
LAC(t) → [370/41; 139/41]
LED(u) → [370/41; 139/41]
