A := [-5; 0; 0]
B := [0; -10; 0]
C := [0; 0; -20]
# Треугольник сначала повернуть вокруг оси X на 60 градусов по часовой стрелке, а потом вокруг оси Y на 30 градусов против часовой стрелки.
# Матрица поворота вокруг оси X | Матрица поворота вокруг оси Y
MX(φ) := [1, 0, 0; 0, cos(φ), -sin(φ); 0, sin(φ), cos(φ)]
MY(φ) := [cos(φ), 0, sin(φ); 0, 1, 0; -sin(φ), 0, cos(φ)]
# Новые координаты вершин ABC
MY(π/6)*MX(-π/3)*A → [-5*sqrt(3)/2; 0; 5/2]
MY(π/6)*MX(-π/3)*B → [5*sqrt(3)/2; -5; 15/2]
MY(π/6)*MX(-π/3)*C → [-5; -10*sqrt(3); -5*sqrt(3)]
