A := [-8; 0; 0]
B := [0; -7; 0]
C := [0; 0; -10]
# Треугольник сначала повернуть вокруг оси X на 60 градусов по часовой стрелке, а потом вокруг оси Z на 60 градусов против часовой стрелки.
# Матрица поворота вокруг оси X | Матрица поворота вокруг оси Y
MZ(φ) := [cos(φ), -sin(φ), 0; sin(φ), cos(φ), 0; 0, 0, 1]
MX(φ) := [1, 0, 0; 0, cos(φ), -sin(φ); 0, sin(φ), cos(φ)]
# Новые координаты вершин ABC
MX(-π/3)*MZ(π/3)*A → [-4; -2*sqrt(3); 6]
MX(-π/3)*MZ(π/3)*B → [7*sqrt(3)/2; -7/4; 7*sqrt(3)/4]
MX(-π/3)*MZ(π/3)*C → [0; -5*sqrt(3); -5]
