x3 := 15
x2 := 8
x1 := 7
y3 := 6
y2 := 14
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y1 := 10
C := [15; 6; 1]
A := [7; 10; 1]
B := [8; 14; 1]
MatrixCoordinat := augment(A, B, C, A) = [7, 8, 15, 7; 10, 14, 6, 10; 1, 1, 1, 1]
X := transpose(MatrixCoordinat)[:, 0]
Y := transpose(MatrixCoordinat)[:, 1]
k := ((x1 - x3)*(x2 - x3) + (y1 - y3)*(y2 - y3))/((x2 - x3)^2 + (y2 - y3)^2)
k := ((A[0] - C[0])*(B[0] - C[0]) + (A[1] - C[1])*(B[1] - C[1]))/((B[0] - C[0])^2 + (B[1] - C[1])^2)
# Или можно так:
Px := x3 + k*(x2 - x3) = 9.54867
Px := C[0] + k*(B[0] - C[0]) = 9.54867
Py := y3 + k*(y2 - y3) = 12.2301
Py := C[1] + k*(B[1] - C[1]) = 12.2301
P := [Px; Py; 1]
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fi := 180
fi := π*fi/180
MatrixRotate := [cos(fi), -sin(fi), 0; sin(fi), cos(fi), 0; 0, 0, 1]
MatrixDelta(M) := [1, 0, -M[0]; 0, 1, -M[1]; 0, 0, 1]
A1 := MatrixDelta(P)*A = [-2.54867; -2.23009; 1]
MatrixCoordinatDelta := MatrixDelta(P)*MatrixCoordinat = [-2.54867, -1.54867, 5.45133, -2.54867; -2.23009, 1.76991, -6.23009, -2.23009; 1, 1, 1, 1]
MatrixCoordinatRotate := MatrixRotate*MatrixCoordinatDelta = [2.54867, 1.54867, -5.45133, 2.54867; 2.23009, -1.76991, 6.23009, 2.23009; 1, 1, 1, 1]
MatrixCoordinatNew := MatrixDelta(-P)*MatrixCoordinatRotate = [12.0973, 11.0973, 4.09735, 12.0973; 14.4602, 10.4602, 18.4602, 14.4602; 1, 1, 1, 1]
X := transpose(MatrixCoordinatNew)[:, 0]
Y := transpose(MatrixCoordinatNew)[:, 1]
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