D := [0; 0; 10; 1]
A := [5; 0; 0; 1]
B := [0; 0; 0; 1]
C := [0; 5; 0; 1]
M1 := augment(A, B, C, D) = [5, 0, 0, 0; 0, 0, 5, 0; 0, 0, 0, 10; 1, 1, 1, 1]
rv := 10
φvg := 20
φv := φvg*π/180
θvg := 45
θv := θvg*π/180
RV := [
    -sin(φv), cos(φv), 0, 0;
    -cos(θv)*cos(φv), -cos(θv)*sin(φv), sin(θv), 0;
    -sin(θv)*cos(φv), -sin(θv)*sin(φv), -cos(θv), rv;
    0, 0, 0, 1
]
MV := RV*M1
ZK := transpose(MV)[:, 3]
XK := transpose(MV)[:, 0] = [-1.7101; 0; 4.69846; 0]
YK := transpose(MV)[:, 1]
M2 := stack(transpose(XK), transpose(YK), transpose(ZK))
XLW := 100
YHW := 200
XHW := 800
YLW := 900
XLM := min(XK)
YHM := max(YK)
YLM := min(YK)
XHM := max(XK)
ΔWX := XHW - XLM
ΔWY := YHW - YLW
ΔMX := XHM - XLM
ΔMY := YHM - YLM
kx := ΔWX/ΔMX
ky := ΔWY/ΔMY
TMW := [kx, 0, XLW - kx*XLM; 0, -ky, YHW + ky*YLM; 0, 0, 1]
M3 := TMW*M2
MW := vectorize(round(M3))
[xa, xb, xc, xd; ya, yb, yc, yd; q, q, q, q] := MW
X := transpose([xa, xb, xc, xa, xd, xb, xd, xc])
Y := -transpose([ya, yb, yc, ya, yd, yb, yd, yc])
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