X := [1; 4; 8; 1]
Y := [4; 10; 2; 4]
Z := [1; 1; 1; 1]
MXL := min(X)
MYH := max(Y)
MXH := max(X)
MYL := min(Y)
ΔMX := MXH - MXL
ΔMY := MYH - MYL
WXL := 100
WYH := 800
WXH := 600
WYL := 200
ΔWX := WXH - WXL
ΔWY := WYH - WYL
kx := ΔWX/ΔMX
ky := ΔWY/ΔMY
M1 := stack(transpose(X), transpose(Y), transpose(Z))
TS := [kx, 0, WXL - kx*MXL; 0, -ky, WYH + ky*MYL; 0, 0, 1]
M2 := TS*M1
WX := transpose(M2)[:, 0]
WY := (-transpose(M2))[:, 1]
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