X0 := -4
X1 := 0
X2 := 4
Y2 := -3
Y0 := -3
Y1 := 3
Y := [Y0; Y1; Y2; Y0]
Z := [1; 1; 1; 1]
X := [X0; X1; X2; X0]
φ := 90
φ_rad := φ*π/180
M1 := stack(transpose(X), transpose(Y), transpose(Z))
RS(φ) := [cos(φ), -sin(φ), 0; sin(φ), cos(φ), 0; 0, 0, 1]
M2 := RS(φ_rad)*M1
X1 := transpose(M2)[:, 0]
Y1 := (-transpose(M2))[:, 1]
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M3 := RS(φ_rad)*M2
X3 := transpose(M3)[:, 0]
Y3 := (-transpose(M3))[:, 1]
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M4 := RS(φ_rad)*M3
X4 := transpose(M4)[:, 0]
Y4 := (-transpose(M4))[:, 1]
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